// SBML level 2 version 4

function Constant_flux__irreversible(v)
  v;
end
Constant_flux__irreversible is "Constant flux (irreversible)";

function Menten_Explicit_Enzyme_12(Kcat, km, boundEGFReceptor, PI3KInactive)
  Kcat*boundEGFReceptor*PI3KInactive/(km + PI3KInactive);
end

function MM_Explicit_Enzyme_5(kcat, km, bRafActive, Raf1PPtase)
  kcat*Raf1PPtase*bRafActive/(km + bRafActive);
end

function Menten_Explicit_Enzyme_14(Kcat, km, PI3KActive, AktInactive)
  Kcat*PI3KActive*AktInactive/(km + AktInactive);
end

function Menten_Explicit_Enzyme_9(Kcat, km, ErkActive, PP2AActive)
  Kcat*PP2AActive*ErkActive/(km + ErkActive);
end

function MM_Explicit_Enzyme_7(kcat, km, bRafInactive, RasActive)
  kcat*RasActive*bRafInactive/(km + bRafInactive);
end

function Menten_Explicit_Enzyme_4(Kcat, km, RasActive, Raf1Inactive)
  Kcat*RasActive*Raf1Inactive/(km + Raf1Inactive);
end

function Menten_Explicit_Enzyme_6(Kcat, km, Raf1Active, MekInactive)
  Kcat*Raf1Active*MekInactive/(km + MekInactive);
end

function MM_Explicit_Enzyme_4(kcat, km, Rap1Active, bRafInactive)
  kcat*Rap1Active*bRafInactive/(km + bRafInactive);
end

function Menten_Explicit_Enzyme_2(Kcat, km, SosActive, RasInactive)
  Kcat*SosActive*RasInactive/(km + RasInactive);
end

function Menten_Explicit_Enzyme_7(Kcat, km, PP2AActive, MekActive)
  Kcat*PP2AActive*MekActive/(km + MekActive);
end

function Menten_Explicit_Enzyme_11(Kcat, km, P90RskActive, SosActive)
  Kcat*P90RskActive*SosActive/(km + SosActive);
end

function Menten_Explicit_Enzyme_15(Kcat, km, AktActive, Raf1Active)
  Kcat*AktActive*Raf1Active/(km + Raf1Active);
end

function MM_Explicit_Enzyme_1(kcat, km, boundEGFReceptor, C3GInactive)
  kcat*boundEGFReceptor*C3GInactive/(km + C3GInactive);
end

function Menten_Explicit_Enzyme_10(Kcat, km, ErkActive, P90RskInactive)
  Kcat*ErkActive*P90RskInactive/(km + P90RskInactive);
end

function Menten_Explicit_Enzyme_5(Kcat, km, Raf1PPtase, Raf1Active)
  Kcat*Raf1PPtase*Raf1Active/(km + Raf1Active);
end

function Menten_Explicit_Enzyme_8(Kcat, km, ErkInactive, MekActive)
  Kcat*MekActive*ErkInactive/(km + ErkInactive);
end

function Menten_Explicit_Enzyme_13(Kcat, km, PI3KInactive, RasActive)
  Kcat*RasActive*PI3KInactive/(km + PI3KInactive);
end

function Menten_Explicit_Enzyme_3(Kcat, km, RasGapActive, RasActive)
  Kcat*RasGapActive*RasActive/(km + RasActive);
end

function MM_Explicit_Enzyme_2(kcat, km, C3GActive, Rap1Inactive)
  kcat*C3GActive*Rap1Inactive/(km + Rap1Inactive);
end

function Menten_Explicit_Enzyme_1(Kcat, km, boundEGFReceptor, SosInactive)
  Kcat*boundEGFReceptor*SosInactive/(km + SosInactive);
end

function MM_Explicit_Enzyme_3(kcat, km, Rap1Active, Rap1Gap)
  kcat*Rap1Gap*Rap1Active/(km + Rap1Active);
end

function MM_Explicit_Enzyme_6(kcat, km, bRafActive, MekInactive)
  kcat*bRafActive*MekInactive/(km + MekInactive);
end

model MODEL1611280000()
  // Orton2009 - Modelling cancerous mutations in the EGFR/ERK pathway - EGF Model
  // This model studies the aberrations in ERK signalling for different cancer mutations. The authors alter a previously existing EGF model (Brown et al 2004) to include new interactions that better fit empirical data. Predictions show that the ERK signalling is a robust mechanism taking different courses for different cancer mutations. Most parameter values are used from the previous model and the new parameters are estimated using experimental data performed by the authors on PC12 cells (adrenal gland, rat). The authors provide an SBML version of the model in the paper.
  // This model is described in the article:
  // Computational modelling of cancerous mutations in the EGFR/ERK signalling pathway.
  // Orton RJ, Adriaens ME, Gormand A, Sturm OE, Kolch W, Gilbert DR.
  // BMC Syst Biol 2009 Oct; 3: 100
  // Abstract:
  // The Epidermal Growth Factor Receptor (EGFR) activated Extracellular-signal Regulated Kinase (ERK) pathway is a critical cell signalling pathway that relays the signal for a cell to proliferate from the plasma membrane to the nucleus. Deregulation of the EGFR/ERK pathway due to alterations affecting the expression or function of a number of pathway components has long been associated with numerous forms of cancer. Under normal conditions, Epidermal Growth Factor (EGF) stimulates a rapid but transient activation of ERK as the signal is rapidly shutdown. Whereas, under cancerous mutation conditions the ERK signal cannot be shutdown and is sustained resulting in the constitutive activation of ERK and continual cell proliferation. In this study, we have used computational modelling techniques to investigate what effects various cancerous alterations have on the signalling flow through the ERK pathway.We have generated a new model of the EGFR activated ERK pathway, which was verified by our own experimental data. We then altered our model to represent various cancerous situations such as Ras, B-Raf and EGFR mutations, as well as EGFR overexpression. Analysis of the models showed that different cancerous situations resulted in different signalling patterns through the ERK pathway, especially when compared to the normal EGF signal pattern. Our model predicts that cancerous EGFR mutation and overexpression signals almost exclusively via the Rap1 pathway, predicting that this pathway is the best target for drugs. Furthermore, our model also highlights the importance of receptor degradation in normal and cancerous EGFR signalling, and suggests that receptor degradation is a key difference between the signalling from the EGF and Nerve Growth Factor (NGF) receptors.Our results suggest that different routes to ERK activation are being utilised in different cancerous situations which therefore has interesting implications for drug selection strategies. We also conducted a comparison of the critical differences between signalling from different growth factor receptors (namely EGFR, mutated EGFR, NGF, and Insulin) with our results suggesting the difference between the systems are large scale and can be attributed to the presence/absence of entire pathways rather than subtle difference in individual rate constants between the systems.
  // This model is hosted on BioModels Database and identified by: BIOMD0000000623.
  // To cite BioModels Database, please use: BioModels Database: An enhanced, curated and annotated resource for published quantitative kinetic models.
  // To the extent possible under law, all copyright and related or neighbouring rights to this encoded model have been dedicated to the public domain worldwide. Please refer to CC0 Public Domain Dedication for more information.
  // biomodels.db:MODEL1611280000
  // biomodels.db:BIOMD0000000623
  // isDescribedBy pubmed:19804630
  // isDerivedFrom biomodels.db:BIOMD0000000033
  // isVersionOf GO:0007173
  // hasTaxon taxonomy:10116

  // Compartments:
  compartment compartment_0 = 1;  // GO:0005623

  // Species:
  // EGFR Receptor bound to EGF; Initial value was estimated from experiments
  species boundEGFReceptor in compartment_0 = 0;  // isVersionOf uniprot:Q9QX70
  // Free EGF receptor; Initial value taken from Brown et al 2004
  species $freeEGFReceptor in compartment_0 = 80000;  // isVersionOf uniprot:Q9QX70
  // Active species of SOS; Initial value taken from Brown et al 2004
  species SosActive in compartment_0 = 0;  // isVersionOf uniprot:Q9Z1I1
  // Active species of SOS; Initial value taken from Brown et al 2004
  species SosInactive in compartment_0 = 120000;  // isVersionOf uniprot:Q9Z1I1
  // Active species of Ras; Initial value taken from Brown et al 2004
  species RasActive in compartment_0 = 0;  // isVersionOf interpro:IPR020849
  // Inactive species of Ras; Initial value taken from Brown et al 2004
  species RasInactive in compartment_0 = 120000;  // isVersionOf interpro:IPR020849
  // Active species of Raf1; Initial value taken from Brown et al 2004
  species Raf1Active in compartment_0 = 0;  // isVersionOf uniprot:P11345
  // Inactive species of Raf1; Initial value taken from Brown et al 2004
  species Raf1Inactive in compartment_0 = 120000;  // isVersionOf uniprot:P11345
  // Active species of MEK; Initial value taken from Brown et al 2004
  species MekActive in compartment_0 = 0;  // isVersionOf uniprot:P36506; isVersionOf uniprot:Q01986
  // Inactive species of MEK; Initial value taken from Brown et al 2004
  species MekInactive in compartment_0 = 600000;  // isVersionOf uniprot:Q01986; isVersionOf uniprot:P36506
  // Active species of ERK; Initial value taken from Brown et al 2004
  species ErkActive in compartment_0 = 0;  // isVersionOf uniprot:P63086; isVersionOf uniprot:P21708
  // Inactive species of ERK; Initial value taken from Brown et al 2004
  species ErkInactive in compartment_0 = 600000;  // isVersionOf uniprot:P21708; isVersionOf uniprot:P63086
  // Active species of P90RSK; Initial value taken from Brown et al 2004
  species P90RskActive in compartment_0 = 0;  // isVersionOf uniprot:Q9Z1I2; isVersionOf uniprot:Q63531
  // Inactive species of P90RSK; Initial value taken from Brown et al 2004
  species P90RskInactive in compartment_0 = 120000;  // isVersionOf uniprot:Q9Z1I2; isVersionOf uniprot:Q63531
  // Active species of PI3K; Initial value taken from Brown et al 2004
  species PI3KActive in compartment_0 = 0;  // isVersionOf uniprot:Q63787
  // Inactive species of PI3K; Initial value taken from Brown et al 2004
  species PI3KInactive in compartment_0 = 120000;  // isVersionOf uniprot:Q63787
  // Active species of Akt; Initial value taken from Brown et al 2004
  species AktActive in compartment_0 = 0;  // isVersionOf uniprot:P47196; isVersionOf uniprot:P47197; isVersionOf uniprot:Q63484
  // Inactive species of Akt; Initial value taken from Brown et al 2004
  species AktInactive in compartment_0 = 120000;  // isVersionOf uniprot:Q63484; isVersionOf uniprot:P47197; isVersionOf uniprot:P47196
  // Degraded species of EGFR; Initial value estimated from experiments
  species degradedEGFReceptor in compartment_0 = 0;  // isVersionOf uniprot:Q9QX70
  // Active species of C3G; Initial value taken from Brown et al 2004
  species C3GActive in compartment_0 = 0;  // isVersionOf uniprot:Q9QYV3
  // Inactive species of C3G; Initial value taken from Brown et al 2004
  species C3GInactive in compartment_0 = 120000;  // isVersionOf uniprot:Q9QYV3
  // Active species of Rap1; Initial value taken from Brown et al 2004
  species Rap1Active in compartment_0 = 0;  // isVersionOf uniprot:Q62636
  // Inactive species of Rap1; Initial value taken from Brown et al 2004
  species Rap1Inactive in compartment_0 = 120000;  // isVersionOf uniprot:Q62636
  // Active species of BRaf; Initial value taken from Brown et al 2004
  species bRafActive in compartment_0 = 0;  // isVersionOf uniprot:F1M9C3
  // Inactive species of BRaf; Initial value taken from Brown et al 2004
  species bRafInactive in compartment_0 = 120000;  // isVersionOf uniprot:F1M9C3
  // Epidermal Growth Factor; Initial value taken from Brown et al 2004
  species $EGF in compartment_0 = 10002000;  // isVersionOf uniprot:P07522
  // Active species of PP2A; Initial value taken from Brown et al 2004
  species $PP2AActive in compartment_0 = 120000;  // isVersionOf GO:0000159
  // Raf1 phosphatase; Initial value taken from Brown et al 2004
  species $Raf1PPtase in compartment_0 = 120000;  // isVersionOf GO:1903293
  // Active GTPase of Ras; Initial value taken from Brown et al 2004
  species $RasGapActive in compartment_0 = 120000;  // isVersionOf uniprot:P50904
  // GTPase of Rap1; Initial value taken from Brown et al 2004
  species $Rap1Gap in compartment_0 = 120000;  // isVersionOf uniprot:F1LV89
  // Species preceding active EGF receptor; Initial value estimated from experiments
  species $proEGFReceptor in compartment_0 = 1;  // isVersionOf uniprot:Q9QX70

  // Reactions:
  // Parameters taken from Brown et al 2004
  Sos_Activation: SosInactive => SosActive; compartment_0*Menten_Explicit_Enzyme_1(Sos_Activation_Kcat, Sos_Activation_km, boundEGFReceptor, SosInactive);  // modifiers: boundEGFReceptor
    Sos_Activation_Kcat = 694.731; Sos_Activation_km = 6086070;
  // Parameters were estimated from experiments
  Sos_Deactivation: SosActive => SosInactive; compartment_0*Sos_Deactivation_k1*SosActive;
    Sos_Deactivation_k1 = 2.5;
  // Parameters taken from Brown et al 2004
  Ras_Activation: RasInactive => RasActive; compartment_0*Menten_Explicit_Enzyme_2(Ras_Activation_Kcat, Ras_Activation_km, SosActive, RasInactive);  // modifiers: SosActive
    Ras_Activation_Kcat = 32.344; Ras_Activation_km = 35954.3;
  // Parameters taken from Brown et al 2004
  Ras_Deactivation: RasActive => RasInactive; compartment_0*Menten_Explicit_Enzyme_3(Ras_Deactivation_Kcat, Ras_Deactivation_km, RasGapActive, RasActive);  // modifiers: RasGapActive
    Ras_Deactivation_Kcat = 1509.36; Ras_Deactivation_km = 1432410;
  // Parameters taken from Brown et al 2004
  Raf1_Activation: Raf1Inactive => Raf1Active; compartment_0*Menten_Explicit_Enzyme_4(Raf1_Activation_Kcat, Raf1_Activation_km, RasActive, Raf1Inactive);  // modifiers: RasActive
    Raf1_Activation_Kcat = 0.884096; Raf1_Activation_km = 62464.6;
  // Parameters taken from Brown et al 2004
  Raf1_Deactivation: Raf1Active => Raf1Inactive; compartment_0*Menten_Explicit_Enzyme_5(Raf1_Deactivation_Kcat, Raf1_Deactivation_km, Raf1PPtase, Raf1Active);  // modifiers: Raf1PPtase
    Raf1_Deactivation_Kcat = 0.126329; Raf1_Deactivation_km = 1061.71;
  // Parameters taken from Brown et al 2004
  Mek_Activation: MekInactive => MekActive; compartment_0*Menten_Explicit_Enzyme_6(Mek_Activation_Kcat, Mek_Activation_km, Raf1Active, MekInactive);  // modifiers: Raf1Active
    Mek_Activation_Kcat = 185.759; Mek_Activation_km = 4768350;
  // Parameters taken from Brown et al 2004
  Mek_Deactivation: MekActive => MekInactive; compartment_0*Menten_Explicit_Enzyme_7(Mek_Deactivation_Kcat, Mek_Deactivation_km, PP2AActive, MekActive);  // modifiers: PP2AActive
    Mek_Deactivation_Kcat = 2.83243; Mek_Deactivation_km = 518753;
  // Parameters taken from Brown et al 2004
  Erk_Activation: ErkInactive => ErkActive; compartment_0*Menten_Explicit_Enzyme_8(Erk_Activation_Kcat, Erk_Activation_km, ErkInactive, MekActive);  // modifiers: MekActive
    Erk_Activation_Kcat = 9.85367; Erk_Activation_km = 1007340;
  // Parameters taken from Brown et al 2004
  Erk_Deactivation: ErkActive => ErkInactive; compartment_0*Menten_Explicit_Enzyme_9(Erk_Deactivation_Kcat, Erk_Deactivation_km, ErkActive, PP2AActive);  // modifiers: PP2AActive
    Erk_Deactivation_Kcat = 8.8912; Erk_Deactivation_km = 3496490;
  // Parameters taken from Brown et al 2004
  P90Rsk_Activation: P90RskInactive => P90RskActive; compartment_0*Menten_Explicit_Enzyme_10(P90Rsk_Activation_Kcat, P90Rsk_Activation_km, ErkActive, P90RskInactive);  // modifiers: ErkActive
    P90Rsk_Activation_Kcat = 0.0213697; P90Rsk_Activation_km = 763523;
  // Parameters were estimated from experiments
  P90Rsk_Deactivation: P90RskActive => P90RskInactive; compartment_0*P90Rsk_Deactivation_k1*P90RskActive;
    P90Rsk_Deactivation_k1 = 0.005;
  // Parameters taken from Brown et al 2004
  Sos_Feedback_Deactivation: SosActive => SosInactive; compartment_0*Menten_Explicit_Enzyme_11(Sos_Feedback_Deactivation_Kcat, Sos_Feedback_Deactivation_km, P90RskActive, SosActive);  // modifiers: P90RskActive
    Sos_Feedback_Deactivation_Kcat = 1611.97; Sos_Feedback_Deactivation_km = 896896;
  // Parameters taken from Brown et al 2004
  PI3K_Activation_EGFR: PI3KInactive => PI3KActive; compartment_0*Menten_Explicit_Enzyme_12(PI3K_Activation_EGFR_Kcat, PI3K_Activation_EGFR_km, boundEGFReceptor, PI3KInactive);  // modifiers: boundEGFReceptor
    PI3K_Activation_EGFR_Kcat = 10.6737; PI3K_Activation_EGFR_km = 184912;
  // Parameters taken from Brown et al 2004
  PI3K_Activation_Ras: PI3KInactive => PI3KActive; compartment_0*Menten_Explicit_Enzyme_13(PI3K_Activation_Ras_Kcat, PI3K_Activation_Ras_km, PI3KInactive, RasActive);  // modifiers: RasActive
    PI3K_Activation_Ras_Kcat = 0.0771067; PI3K_Activation_Ras_km = 272056;
  // Parameters taken from Brown et al 2004
  PI3K_Deactivation: PI3KActive => PI3KInactive; compartment_0*PI3K_Deactivation_k1*PI3KActive;
    PI3K_Deactivation_k1 = 0.005;
  // Parameters taken from Brown et al 2004
  Akt_Activation: AktInactive => AktActive; compartment_0*Menten_Explicit_Enzyme_14(Akt_Activation_Kcat, Akt_Activation_km, PI3KActive, AktInactive);  // modifiers: PI3KActive
    Akt_Activation_Kcat = 0.0566279; Akt_Activation_km = 653951;
  // Parameters were estimated from experiments
  Akt_Deactivation: AktActive => AktInactive; compartment_0*Akt_Deactivation_k1*AktActive;
    Akt_Deactivation_k1 = 0.005;
  // Parameters taken from Brown et al 2004
  Raf1_Deactivation_Akt: Raf1Active => Raf1Inactive; compartment_0*Menten_Explicit_Enzyme_15(Raf1_Deactivation_Akt_Kcat, Raf1_Deactivation_Akt_km, AktActive, Raf1Active);  // modifiers: AktActive
    Raf1_Deactivation_Akt_Kcat = 15.1212; Raf1_Deactivation_Akt_km = 119355;
  // Parameters were estimated from experiments
  EGFReceptor_Degradation: boundEGFReceptor => degradedEGFReceptor; compartment_0*EGFReceptor_Degradation_k1*boundEGFReceptor;
    EGFReceptor_Degradation_k1 = 0.2;
  // Parameters taken from Brown et al 2004
  C3G_Activation: C3GInactive => C3GActive; compartment_0*MM_Explicit_Enzyme_1(C3G_Activation_kcat, C3G_Activation_km, boundEGFReceptor, C3GInactive);  // modifiers: boundEGFReceptor
    C3G_Activation_kcat = 694.731; C3G_Activation_km = 6086070;
  // Parameters were estimated from experiments
  C3G_Deactivation: C3GActive => C3GInactive; compartment_0*C3G_Deactivation_k1*C3GActive;
    C3G_Deactivation_k1 = 2.5;
  // Parameters taken from Brown et al 2004
  Rap1_Activation: Rap1Inactive => Rap1Active; compartment_0*MM_Explicit_Enzyme_2(Rap1_Activation_kcat, Rap1_Activation_km, C3GActive, Rap1Inactive);  // modifiers: C3GActive
    Rap1_Activation_kcat = 32.344; Rap1_Activation_km = 35954.3;
  // Parameters taken from Brown et al 2004
  Rap1_Deactivation: Rap1Active => Rap1Inactive; compartment_0*MM_Explicit_Enzyme_3(Rap1_Deactivation_kcat, Rap1_Deactivation_km, Rap1Active, Rap1Gap);  // modifiers: Rap1Gap
    Rap1_Deactivation_kcat = 1509.36; Rap1_Deactivation_km = 1432410;
  // Parameters taken from Brown et al 2004
  bRaf_Activation: bRafInactive => bRafActive; compartment_0*MM_Explicit_Enzyme_4(bRaf_Activation_kcat, bRaf_Activation_km, Rap1Active, bRafInactive);  // modifiers: Rap1Active
    bRaf_Activation_kcat = 0.884096; bRaf_Activation_km = 62464.6;
  // Parameters taken from Brown et al 2004
  bRaf_Deactivation: bRafActive => bRafInactive; compartment_0*MM_Explicit_Enzyme_5(bRaf_Deactivation_kcat, bRaf_Deactivation_km, bRafActive, Raf1PPtase);  // modifiers: Raf1PPtase
    bRaf_Deactivation_kcat = 0.126329; bRaf_Deactivation_km = 1061.71;
  // Parameters taken from Brown et al 2004
  Mek_Activation_bRaf: MekInactive => MekActive; compartment_0*MM_Explicit_Enzyme_6(Mek_Activation_bRaf_kcat, Mek_Activation_bRaf_km, bRafActive, MekInactive);  // modifiers: bRafActive
    Mek_Activation_bRaf_kcat = 185.759; Mek_Activation_bRaf_km = 4768350;
  // Parameters were estimated from experiments
  EGFReceptor_Production: $proEGFReceptor => $freeEGFReceptor; compartment_0*Constant_flux__irreversible(v);
    v = 100;
  // Parameters were estimated from experiments
  EGFReceptor_Degradtion_Free: $freeEGFReceptor => degradedEGFReceptor; compartment_0*EGFReceptor_Degradtion_Free_k1*freeEGFReceptor;
    EGFReceptor_Degradtion_Free_k1 = 0.00125;
  // Parameters taken from Brown et al 2004
  bRaf_Activation_Ras: bRafInactive => bRafActive; compartment_0*MM_Explicit_Enzyme_7(bRaf_Activation_Ras_kcat, bRaf_Activation_Ras_km, bRafInactive, RasActive);  // modifiers: RasActive
    bRaf_Activation_Ras_kcat = 0.884096; bRaf_Activation_Ras_km = 62464.6;
  reaction_0_fwd: $EGF + $freeEGFReceptor => boundEGFReceptor; compartment_0*reaction_0_fwd_k1*EGF*freeEGFReceptor;
    reaction_0_fwd_k1 = 2.18503e-5; reaction_0_fwd_k2 = 0.121008;
  reaction_0_rev: boundEGFReceptor => $EGF + $freeEGFReceptor; compartment_0*reaction_0_rev_k2*boundEGFReceptor;
    reaction_0_rev_k1 = 2.18503e-5; reaction_0_rev_k2 = 0.121008;

  // Unit definitions:
  unit volume = 1e-3 litre;
  unit time = 60 second;
  unit substance = 1e-3 mole;
end
