// SBML level 3 version 1

function reazione_r2_func(EA, k_param)
  k_param*EA*EA;
end

model ReazioniChimiche()
  // Modello di esempio con reazioni chimiche

  // Compartments:
  compartment cell = 1 litre;

  // Species:
  species A in cell = 10;  // substance in mole
  species E in cell = 5;  // substance in mole
  species EA in cell = 0;  // substance in mole
  species B in cell = 0;  // substance in mole
  species C in cell = 0;  // substance in mole

  // Parameters:
  k1 = 0.5 per_second;
  k2 = 0.1 per_second;
  k3 = 0.3 per_second;

  // Reactions:
  r1: A + E => EA; k1*A*E; r1 is "Formazione del complesso enzima-substrato";
  r2: 2 EA => E + C; reazione_r2_func(EA, k3); r2 is "Conversione del substrato e rilascio del prodotto";
  Produzione_di_B: EA => E + B; k2*EA;

  // Unit definitions:
  unit molarity = mole / litre;
  unit per_second = 1 / second;
end
