// SBML level 3 version 1

model ReazioniChimiche()
  // Modello di esempio con reazioni chimiche

  // Compartments:
  compartment citoplasma = 1 volume; citoplasma is "Citoplasma cellulare";

  // Species:
  species A in citoplasma = 10; A is "Substrato A";
  species B in citoplasma = 5; B is "Substrato B";
  species C in citoplasma = 0; C is "Prodotto C";
  species E in citoplasma = 2; E is "Enzima";
  species EA in citoplasma = 0; EA is "Complesso Enzima-Substrato";

  // Parameters:
  k1 = 1.5 time;
  k2 = 0.5 time;
  k3 = 2 time;
  Ka = 0.8;
  Vmax = 5 substance;
  E_total = 2;
  A_total = 10;
  B_total = 5;

  // Reactions:
  r1: A + E -> EA; k1*A*E - k2*EA; r1 is "Formazione del complesso Enzima-Substrato";
  r2: 2 EA => E + C; k3*EA*EA; r2 is "Conversione del substrato e rilascio del prodotto";
  Conversione_di_B_in_C: B => C; Vmax*B/(Ka + B);
    local_Vmax = 5; local_Ka = 0.8;

  // Unit definitions:
  unit volume = litre;
  unit substance = 1e-3 mole;
  unit time = second;
end
