// SBML level 3 version 2

function f_MM_vol(Vmax, Km, substrate, volume)
  volume*(Vmax*substrate/(Km + substrate));
end

function f_mass_action_reversible_vol_fwd(k_fwd, reactant)
  k_fwd*reactant;
end

function f_mass_action_reversible_vol_rev(k_rev, product)
  k_rev*product;
end

function f_mass_action_compartment_explicit_fwd(k_fwd, reactant)
  k_fwd*reactant;
end

function f_mass_action_compartment_explicit_rev(k_rev, product)
  k_rev*product;
end

model Mixed_Kinetics_Model_Volume_Corrected()
  // Model with Volume Scaled Kinetics

  // Compartments:
  compartment cell = 1.5;

  // Species:
  species S1 in cell = 10;
  species P1 in cell = 0;
  species S2 in cell = 10;
  species P2 in cell = 0;
  species S3 in cell = 10;
  species P3 in cell = 0;
  species S4 in cell = 10;
  species P4 in cell = 0;
  species S5 in cell = 10;
  species P5 in cell = 0;
  species S6 in cell = 10;
  species P6 in cell = 0;

  // Reactions:
  R1_MassAction_Explicit: S1 => P1; cell*k1*S1;
    k1 = 0.1;
  R3_MM_Explicit: S3 => P3; cell*(Vmax*S3/(Km + S3));
    Vmax = 1; Km = 2;
  R4_MM_Function: S4 => P4; f_MM_vol(Vmax_local, Km_local, S4, cell);
    Vmax_local = 1.5; Km_local = 2.5;
  R2_MassAction_Function_fwd: S2 => P2; cell*f_mass_action_reversible_vol_fwd(R2_MassAction_Function_fwd_kf, S2);
    R2_MassAction_Function_fwd_kf = 0.1; R2_MassAction_Function_fwd_kr = 0.05;
  R2_MassAction_Function_rev: P2 => S2; cell*f_mass_action_reversible_vol_rev(R2_MassAction_Function_rev_kr, P2);
    R2_MassAction_Function_rev_kf = 0.1; R2_MassAction_Function_rev_kr = 0.05;
  R5_New_Structure_fwd: S5 => P5; cell*f_mass_action_compartment_explicit_fwd(R5_New_Structure_fwd_kf_new, S5);
    R5_New_Structure_fwd_kf_new = 0.2; R5_New_Structure_fwd_kr_new = 0.1;
  R5_New_Structure_rev: P5 => S5; cell*f_mass_action_compartment_explicit_rev(R5_New_Structure_rev_kr_new, P5);
    R5_New_Structure_rev_kf_new = 0.2; R5_New_Structure_rev_kr_new = 0.1;
  R6_MassAction_Reversible_Explicit_fwd: S6 => P6; cell*R6_MassAction_Reversible_Explicit_fwd_k_forward*S6;
    R6_MassAction_Reversible_Explicit_fwd_k_forward = 0.15; R6_MassAction_Reversible_Explicit_fwd_k_reverse = 0.08;
  R6_MassAction_Reversible_Explicit_rev: P6 => S6; cell*R6_MassAction_Reversible_Explicit_rev_k_reverse*P6;
    R6_MassAction_Reversible_Explicit_rev_k_forward = 0.15; R6_MassAction_Reversible_Explicit_rev_k_reverse = 0.08;
end
